def createScene(rootnode):
    from utils.header import addHeader, addSolvers
    from parts.controllers.assemblycontroller import AssemblyController
    from parts.emio import Emio, getParserArgs

    args = getParserArgs()

    settings, modelling, simulation = addHeader(rootnode, inverse=True)

    rootnode.dt = 0.01
    rootnode.gravity = [0., -9810., 0.]
    addSolvers(simulation)

    # Add Emio to the scene
    # The args are set from introduction.md
    emio = Emio(name="Emio",
                legsName=["blueleg"],
                legsModel=["tetra"],
                legsPositionOnMotor=["counterclockwisedown","clockwisedown","counterclockwisedown","clockwisedown"],
                centerPartName="bluepart",
                centerPartType="rigid",
                extended=True)
    if not emio.isValid():
        return

    simulation.addChild(emio)
    emio.attachCenterPartToLegs()
    emio.addObject(AssemblyController(emio))

    # Effector
    emio.effector.addObject("MechanicalObject", template="Rigid3", position=[0, 0, 0, 0, 0, 0, 1])
    emio.effector.addObject("RigidMapping", index=0)

    # Target
    effectorTarget = modelling.addChild('Target')
    effectorTarget.addObject('EulerImplicitSolver', firstOrder=True)
    effectorTarget.addObject('CGLinearSolver', iterations=50, tolerance=1e-10, threshold=1e-10)
    effectorTarget.addObject('MechanicalObject', template='Rigid3',
                             position=[0, -150, 0, 0, 0, 0, 1],
                             showObject=True, showObjectScale=20)

    # Inverse components and GUI
    emio.addInverseComponentAndGUI(effectorTarget.getMechanicalState().position.linkpath)

    # Components for the connection to the real robot
    emio.addConnectionComponents()

    return rootnode
